# variables
variable       lammps_ani_root getenv LAMMPS_ANI_ROOT
variable       log_dir         index  logs
# kokkos needs newton_pair off (LAMMPS Kokkos requires newton off for full neighbor list)
variable       newton_pair     index  off
variable       timestamp       index  timestamp
variable       label           index  label
# configuration
variable       data_file       index  none
variable       timestep        index  timestep
variable       run_steps       index  1000
variable       replicate       index  "1 1 1"
# ani variables
variable       ani_model_file  index  none
variable       ani_device      index  cuda
variable       ani_num_models  index  1
variable       ani_aev         index  cuaev
variable       ani_neighbor    index  full
variable       ani_precision   index  single

# Intialization
units          real
atom_style     atomic

neighbor       2.0 bin
# check yes = only build if at least one atom has moved half the skin distance or more
neigh_modify   every 10 delay 0 check yes
newton         ${newton_pair} off

# Atom Definition
read_data      ${data_file}
replicate      ${replicate}
change_box     all boundary p p p

# pair_style ani 5.1 model_file device num_models ani_aev ani_neighbor
# 0. model_file               = path to the model file
# 1. device                   = cuda/cpu
# 2. num_models (Optional)    = number of models to use, default as -1 to use all models
# 3. ani_aev (Optional)       = cuaev/pyaev, default as cuaev
# 4. ani_neighbor (Optional)  = full/half, default as full nbrlist
# 5. ani_precision (Optional) = single/double, default as single
# pair_style     ani 5.1 ${ani_model_file} ${ani_device} ${ani_num_models} ${ani_aev} ${ani_neighbor} ${ani_precision}
pair_style     ani 5.1 ${ani_model_file} ${ani_device} ${ani_num_models} pyaev ${ani_neighbor} ${ani_precision}
pair_coeff     * *

# Thermo
thermo_style   custom step pe ke etotal temp press vol density
thermo         100

# Dump
# dump           1 all custom 100 ${log_dir}/${timestamp}.lammpstrj id element x y z ix iy iz
# dump_modify    1 element H C N O F S Cl
dump           2 all dcd 100 ${log_dir}/${label}.dcd

# Settings: temperature at 300 K
velocity       all create 300.0 12345 rot yes mom yes dist gaussian
timestep       ${timestep}

# Minimization
minimize       1.0e-8 1.0e-8 1000 10000

# run npt
# fix            0 all npt temp 300.0 300.0 100.0 iso 2500.0 2500.0 100.0
# run            10000
# unfix          0

# run nvt
# fix            1 all langevin 300.0 300.0 100.0 12345
# fix            2 all nve
fix            4 all plumed plumedfile ${log_dir}/${label}.plumed.dat outfile ${log_dir}/${label}.plumed.log
fix            0 all npt temp 300.0 300.0 100.0 iso 1.0 1.0 500.0
# Keep the system's center-of-mass at the box center every timestep.
fix            3 all recenter 0.5 0.5 0.5

# Equilibration (5ps)
run           20000

# Disable the dump temporarily, reset timestep and re-enable the dump
# TODO dcd file needs to be renames correctly for the umbrella window
undump         2
reset_timestep 0
dump           2 all dcd 100 ${log_dir}/${label}.prod.dcd

# Run the simulation: (100 ps)
run            200000

# Write final state of simulation
write_data    ${log_dir}/${timestamp}.final
