# variables
variable       lammps_ani_root getenv LAMMPS_ANI_ROOT
# kokkos needs newton_pair off (LAMMPS Kokkos requires newton off for full neighbor list)
variable       newton_pair     index  off
variable       num_models      index  1
variable       datafile        index  none
variable       timestamp       index  timestamp
variable       modelfile       index  none
variable       timestep        index  timestep

# Intialization
units          real
atom_style     atomic

neighbor       2.0 bin
# check yes = only build if at least one atom has moved half the skin distance or more
neigh_modify   every 10 delay 0 check yes
newton         ${newton_pair} off

# Per-atom mass definition
fix            Hmrmass all property/atom rmass ghost yes
# Atom Definition
read_data      ${datafile} fix Hmrmass NULL Hmrmass

# replicate      3 3 3
change_box     all boundary p p p

# pair_style ani 5.1 model_file device num_models ani_aev ani_neighbor
# 0. model_file               = path to the model file
# 1. device                   = cuda/cpu
# 2. num_models (Optional)    = number of models to use, default as -1 to use all models
# 3. ani_aev (Optional)       = cuaev/pyaev, default as cuaev
# 4. ani_neighbor (Optional)  = full/half, default as full nbrlist
# 5. ani_precision (Optional) = single/double, default as single
pair_style     ani 5.1 ${modelfile} cuda ${num_models} cuaev full single
pair_coeff     * *

# Thermo
thermo_style   custom step pe ke etotal temp press vol density
thermo         100

# Dump
dump           1 all custom 100 logs/${timestamp}.lammpstrj id element x y z ix iy iz
dump_modify    1 element H C N O F S Cl
dump           2 all dcd 100 logs/${timestamp}.dcd

# Settings: temperature at 300 K
velocity       all create 300.0 12345 rot yes mom yes dist gaussian
timestep       ${timestep}

# run npt
# fix            0 all npt temp 300.0 300.0 100.0 iso 2500.0 2500.0 100.0
# run            10000
# unfix          0

# run nvt
fix            1 all langevin 300.0 300.0 100.0 12345
fix            2 all nve
# Keep the system's center-of-mass at the box center every timestep.
fix            3 all recenter 0.5 0.5 0.5

run            50000000

# Write final state of simulation
write_data    logs/${timestamp}.final
