# variables
variable       lammps_ani_root getenv LAMMPS_ANI_ROOT
variable       log_dir         index  logs
# kokkos needs newton_pair on for reverse communication between gpus
variable       newton_pair     index  off
variable       timestamp       index  timestamp
# configuration
variable       data_file       index  none
variable       timestep        index  timestep
variable       run_steps       index  1000
variable       replicate       index  "1 1 1"
# ani variables
variable       ani_model_file  index  none
variable       ani_device      index  cuda
variable       ani_num_models  index  1
variable       ani_aev         index  cuaev
variable       ani_neighbor    index  full
variable       ani_precision   index  single

# Intialization
units          real
atom_style     atomic

neighbor       2.0 bin
# check yes = only build if at least one atom has moved half the skin distance or more
neigh_modify   every 10 delay 0 check yes
newton         ${newton_pair} off

# Atom Definition
read_data      ${data_file}
replicate      ${replicate}
change_box     all boundary p p p

# pair_style ani 5.1 model_file device num_models ani_aev ani_neighbor
# 0. model_file               = path to the model file
# 1. device                   = cuda/cpu
# 2. num_models (Optional)    = number of models to use, default as -1 to use all models
# 3. ani_aev (Optional)       = cuaev/pyaev, default as cuaev
# 4. ani_neighbor (Optional)  = full/half, default as full nbrlist
# 5. ani_precision (Optional) = single/double, default as single
pair_style     ani 5.1 ${ani_model_file} ${ani_device} ${ani_num_models} ${ani_aev} ${ani_neighbor} ${ani_precision}
pair_coeff     * *

# Thermo
thermo_style   custom step pe ke etotal temp press vol density
thermo         50

# Dump
# dump           1 all custom 50 ${log_dir}/${timestamp}.lammpstrj id element x y z ix iy iz
# dump_modify    1 element H C N O F S Cl
dump           2 all dcd 50 ${log_dir}/${timestamp}.dcd

# Settings: temperature at 0 K
velocity       all create 0.0 12345 rot yes mom yes dist gaussian
timestep       ${timestep}

# Generate restart files every 100000 steps
restart        100000 ${log_dir}/${timestamp}.restart.0 ${log_dir}/${timestamp}.restart.1

# 0 K to 300 K in the first 100 ps
fix            1 all langevin 0.0 300.0 100.0 12345
fix            2 all nve
# assume timestep is 0.25 fs, and run 100 ps, 100 * 1000 / 0.25 = 400000
run            400000

# 300 K to 2500 K in the next 100 ps
fix            1 all langevin 300.0 2500.0 100.0 12345
fix            2 all nve
# assume timestep is 0.25 fs, and run 100 ps, 100 * 1000 / 0.25 = 400000
run            400000

# maintained at 2500 K for 4000 ps
fix            1 all langevin 2500.0 2500.0 100.0 12345
fix            2 all nve
# assume timestep is 0.25 fs, and run 4000 ps, 4000 * 1000 / 0.25 = 16000000
run            16000000

# cooled from 2500 K to 300 K over the final 200 ps
fix            1 all langevin 2500.0 300.0 100.0 12345
fix            2 all nve
# assume timestep is 0.25 fs, and run 200 ps, 200 * 1000 / 0.25 = 800000
run            800000

# Write final state of simulation
write_data    ${log_dir}/${timestamp}.final
