# bulk water

units           metal
boundary        p p p
atom_style      atomic

neighbor        2.0 bin
neigh_modify    every 10 delay 0 check no

# TODO H, C, N, O: 1, 2, 3, 4
read_data       water.small.lmp
mass            1 1.008
mass            2 15.999

# load the plugin
# plugin load ani_plugin.so

pair_style      ani 5.1 ../../models/ani2x_cuda.pt cuda
pair_coeff      * *

velocity        all create 330.0 4928459

fix             1 all nvt temp 330.0 330.0 0.5
timestep        0.000005
thermo_style    custom step pe ke etotal temp press vol
thermo          100
dump            1 all custom 100 water.dump id type x y z

run             10000
